*Heading
** Job name: Job-1 Model name: Model-1
** Generated by: Abaqus/CAE 2018
*Preprint, echo=NO, model=NO, history=NO, contact=NO
**
** PARTS
**
*Part, name=star
*Node
      1, 0.0170000009,           0.,           0.
      2, 0.0170000009,           0.,  0.150000006
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*Element, type=DC3D4
  1, 1003,  398, 1004,  399
  2, 1003, 1005,  398,  397
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*Nset, nset=_PickedSet9, internal, generate
    1,  1471,     1
*Elset, elset=_PickedSet9, internal, generate
    1,  6095,     1
*Nset, nset=HFlux
    2,   21,   22,   23,   24,   25
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** Section: Section-1
*Solid Section, elset=_PickedSet9, material=Material-1
,
*End Part
**
**
** ASSEMBLY
**
*Assembly, name=Assembly
**
*Instance, name=star-1, part=star
*End Instance
**
*Nset, nset=_PickedSet4, internal, instance=star-1, generate
    1,  1471,     1
*Elset, elset=_PickedSet4, internal, instance=star-1, generate
    1,  6095,     1
*Nset, nset=_PickedSet5, internal, instance=star-1
   1,   3,   4,   5,   6,   7
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*Elset, elset=_PickedSet5, internal, instance=star-1
   30,  167,  174,  182,  258,  278
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*End Assembly
**
** MATERIALS
**
*Material, name=Material-1
*Conductivity
200.,
*Density
1000.,
*Specific Heat
2000.,
**
** PREDEFINED FIELDS
**
** Name: T0   Type: Temperature
*Initial Conditions, type=TEMPERATURE
_PickedSet4, 0.
** ----------------------------------------------------------------
**
** STEP: Step-1
**
*Step, name=Step-1, nlgeom=NO, inc=10000
*Heat Transfer, end=PERIOD
0.03, 120., , ,
**
** BOUNDARY CONDITIONS
**
** Name: FixT Type: Temperature
*Boundary
_PickedSet5, 11, 11
**
** LOADS
**
** Name: Load-1   Type: Concentrated heat flux
*Cflux
star-1.HFlux, 11, 4.
**
** OUTPUT REQUESTS
**
*Restart, write, frequency=0
**
** FIELD OUTPUT: F-Output-1
**
*Output, field, variable=PRESELECT
*Output, history, frequency=0
*End Step
